# OpenSim document version 30516
Model LoadCarryingExoskeleton_by_Moran:
  gravity: 0 -9.80665 0
  length_units: meters
  force_units: N
  credits:
    Delp S.L., Loan J.P., Hoy M.G., Zajac F.E., Topp E.L., Rosen J.M., Thelen D.G., Anderson F.C., Seth A. Notes: 3D, 23 DOF gait model created by D.G. Thelen, Univ. of Wisconsin-Madison, and Ajay Seth, Frank C. Anderson, and Scott L. Delp, Stanford University. Lower extremity joint defintions based on Delp et al. (1990). Low back joint and anthropometry based on Anderson and Pandy (1999, 2001). Planar knee model of Yamaguchi and Zajac (1989). Seth replaced tibia translation constraints with a CustomJoint for the knee and removed the patella to eliminate all kinematic constraints; insertions of the quadrucepts are handled with moving points in the tibia frame as defined by Delp 1990. Number of muscles was reduced by Anderson to improve simulation speed for demonstrations and is not intended to be used in research. License: Creative Commons (CCBY 3.0). You are free to distribute, remix, tweak, and build upon this work, even commercially, as long as you credit us for the original creation. http://creativecommons.org/licenses/by/3.0/ More Information: http://simtk-confluence.stanford.edu:8080/display/OpenSim/Gait+2392+and+2354+Models
  publications:
    Delp, S.L., Loan, J.P., Hoy, M.G., Zajac, F.E., Topp E.L., Rosen, J.M.: An interactive graphics-based model of the lower extremity to study orthopaedic surgical procedures, IEEE Transactions on Biomedical Engineering, vol. 37, pp. 757-767, 1990. Yamaguchi G.T., Zajac F.E.: A planar model of the knee joint to characterize the knee extensor mechanism." J . Biomech. vol. 22. pp. 1-10. 1989. Anderson F.C., Pandy M.G.: A dynamic optimization solution for vertical jumping in three dimensions. Computer Methods in Biomechanics and Biomedical Engineering 2:201-231, 1999. Anderson F.C., Pandy M.G.: Dynamic optimization of human walking. Journal of Biomechanical Engineering 123:381-390, 2001.
  TableReporter__double_ Exo_results: report_time_interval=0.001 [s]
      input_inputs_connectee_names=(../LoadCarryingExoskeleton_by_Moran/ground_pelvis/pelvis_tx|value(p_tx) ../LoadCarryingExoskeleton_by_Moran/ground_pelvis/pelvis_ty|value(p_ty) ../LoadCarryingExoskeleton_by_Moran/ground_pelvis/pelvis_tilt|value(p_rz) ../LoadCarryingExoskeleton_by_Moran/jb5b6/jb5b6_coord_0|value(q1) ../LoadCarryingExoskeleton_by_Moran/jb55b5/jb55b5_coord_0|value(q2) ../LoadCarryingExoskeleton_by_Moran/jb41b42/jb41b42_coord_0|value(q3) ../LoadCarryingExoskeleton_by_Moran/jb12b13/jb12b13_coord_0|value(q4) ../LoadCarryingExoskeleton_by_Moran/jb26b34/jb26b34_coord_0|value(q5) ../LoadCarryingExoskeleton_by_Moran/jb34b35/jb34b35_coord_0|value(q6) ../LoadCarryingExoskeleton_by_Moran/jb5b6/jb5b6_coord_0|speed(w1) ../LoadCarryingExoskeleton_by_Moran/jb55b5/jb55b5_coord_0|speed(w2) ../LoadCarryingExoskeleton_by_Moran/jb41b42/jb41b42_coord_0|speed(w3) ../LoadCarryingExoskeleton_by_Moran/jb12b13/jb12b13_coord_0|speed(w4) ../LoadCarryingExoskeleton_by_Moran/jb26b34/jb26b34_coord_0|speed(w5) ../LoadCarryingExoskeleton_by_Moran/jb34b35/jb34b35_coord_0|speed(w6) ../LoadCarryingExoskeleton_by_Moran/jb5b6/jb5b6_coord_0|acceleration(a1) ../LoadCarryingExoskeleton_by_Moran/jb55b5/jb55b5_coord_0|acceleration(a2) ../LoadCarryingExoskeleton_by_Moran/jb41b42/jb41b42_coord_0|acceleration(a3) ../LoadCarryingExoskeleton_by_Moran/jb12b13/jb12b13_coord_0|acceleration(a4) ../LoadCarryingExoskeleton_by_Moran/jb26b34/jb26b34_coord_0|acceleration(a5) ../LoadCarryingExoskeleton_by_Moran/jb34b35/jb34b35_coord_0|acceleration(a6))
  Ground
  BodySet:
    Body pelvis: mass=11.37517 [kg] mass_center=(-0.0724376 0 0) inertia=(0.1042331 0.08831422 0.05870716 0 0 0)
        meshes=(sacrum.vtp pelvis.vtp l_pelvis.vtp)
      PhysicalOffsetFrame pmf: socket_parent_connectee_name=../LoadCarryingExoskeleton_by_Moran/pelvis
          translation=(-0.2 0.2 0) [meters]
        Sphere pmf_geom_1: socket_frame_connectee_name=../LoadCarryingExoskeleton_by_Moran/pelvis/pmf radius=0.02
    Body femur_r: mass=8.984038 mass_center=(0 -0.1950308 0) inertia=(0.1702207 0.04462096 0.1795009 0 0 0)
        meshes=femur_r.vtp
    Body tibia_r: mass=3.581001 mass_center=(0 -0.1845572 0) inertia=(0.04756937 0.004813567 0.04823005 0 0 0)
        meshes=(tibia_r.vtp fibula.vtp)
    Body talus_r: mass=0.09658802 mass_center=(0 0 0) inertia=(0.001198606 0.001198606 0.001198606 0 0 0)
        meshes=talus.vtp
    Body calcn_r: mass=1.20735 mass_center=(0.1027085 0.03081254 0) inertia=(0.001426474 0.003973749 0.004177531 0 0 0)
        meshes=foot.vtp
    Body toes_r: mass=0.2092097 mass_center=(0.03553713 0.006162509 -0.01797398)
        inertia=(0.000101891 0.000203782 0.000101891 0 0 0) meshes=bofoot.vtp
    Body femur_l: mass=8.984038 mass_center=(0 -0.1950308 0) inertia=(0.1702207 0.04462096 0.1795009 0 0 0)
        meshes=femur_l.vtp
    Body tibia_l: mass=3.581001 mass_center=(0 -0.1845572 0) inertia=(0.04756937 0.004813567 0.04823005 0 0 0)
        meshes=(tibia_l.vtp l_fibula.vtp)
    Body talus_l: mass=0.09658802 mass_center=(0 0 0) inertia=(0.001198606 0.001198606 0.001198606 0 0 0)
        meshes=l_talus.vtp
    Body calcn_l: mass=1.20735 mass_center=(0.1027085 0.03081254 0) inertia=(0.001426474 0.003973749 0.004177531 0 0 0)
        meshes=l_foot.vtp
    Body toes_l: mass=0.2092097 mass_center=(0.03553713 0.006162509 0.01797398)
        inertia=(0.000101891 0.000203782 0.000101891 0 0 0) meshes=l_bofoot.vtp
    Body torso: mass=33.06845 mass_center=(0.004375757 0.3455104 0.03500176)
        inertia=(1.660314 0.8507069 1.611783 0 0 0) meshes=(hat_spine.vtp hat_jaw.vtp hat_skull.vtp hat_ribs.vtp)
    Body Body1: mass=0 mass_center=(0.2109538 0.34946 0) inertia=(0 0 0 0 0 0) meshes=(ExoGeometry1/body (1).stl)
    Body Body2: mass=0 mass_center=(0.2109538 0.34946 0) inertia=(0 0 0 0 0 0) meshes=(ExoGeometry1/body (2).stl)
    Body Body3: mass=0 mass_center=(0.2109538 0.34946 0) inertia=(0 0 0 0 0 0) meshes=(ExoGeometry1/body (3).stl)
    Body Body4: mass=0 mass_center=(0.2109538 0.34946 0) inertia=(0 0 0 0 0 0) meshes=(ExoGeometry1/body (4).stl)
    Body Body5: mass=2.4 mass_center=(0.3037848 0.11044 1.022111) inertia=(0 0 0 0 0 0)
        meshes=(ExoGeometry1/body (5).stl)
    Body Body6: mass=1e-5 mass_center=(0.2109538 0.34946 0) inertia=(0 0 0 0 0 0) meshes=(ExoGeometry1/body (6).stl)
    Body Body7: mass=2.3 mass_center=(0.2084538 0.219816 0.073808) inertia=(0 0 0 0 0 0)
        meshes=(ExoGeometry1/body (7).stl)
      PhysicalOffsetFrame emf: socket_parent_connectee_name=../LoadCarryingExoskeleton_by_Moran/Body7
          translation=(0.21095 0.19606 0.07381)
        Sphere pmf_geom_1: socket_frame_connectee_name=../LoadCarryingExoskeleton_by_Moran/Body7/emf radius=0.02
    Body Body8: mass=0 mass_center=(0.2109538 0.34946 0) inertia=(0 0 0 0 0 0) meshes=(ExoGeometry1/body (8).stl)
    Body Body9: mass=0 mass_center=(0.2109538 0.34946 0) inertia=(0 0 0 0 0 0) meshes=(ExoGeometry1/body (9).stl)
    Body Body10: mass=0 mass_center=(0.2109538 0.34946 0) inertia=(0 0 0 0 0 0) meshes=(ExoGeometry1/body (10).stl)
    Body Body11: mass=1e-5 mass_center=(0.2109538 0.34946 0) inertia=(0 0 0 0 0 0) meshes=(ExoGeometry1/body (11).stl)
    Body Body12: mass=0 mass_center=(0.2109538 0.34946 0) inertia=(0 0 0 0 0 0) meshes=(ExoGeometry1/body (12).stl)
    Body Body13: mass=2 mass_center=(0.3020888 0.586992 0.400193) inertia=(0 0 0 0 0 0)
        meshes=(ExoGeometry1/body (13).stl)
    Body Body14: mass=0 mass_center=(0.2109538 0.34946 0) inertia=(0 0 0 0 0 0) meshes=(ExoGeometry1/body (14).stl)
    Body Body15: mass=0 mass_center=(0.2109538 0.34946 0) inertia=(0 0 0 0 0 0) meshes=(ExoGeometry1/body (15).stl)
    Body Body16: mass=0 mass_center=(0.2109538 0.34946 0) inertia=(0 0 0 0 0 0) meshes=(ExoGeometry1/body (16).stl)
    Body Body17: mass=0 mass_center=(0.2109538 0.34946 0) inertia=(0 0 0 0 0 0) meshes=(ExoGeometry1/body (17).stl)
    Body Body18: mass=0 mass_center=(0.2109538 0.34946 0) inertia=(0 0 0 0 0 0) meshes=(ExoGeometry1/body (18).stl)
    Body Body19: mass=1e-5 mass_center=(0.2109538 0.34946 0) inertia=(0 0 0 0 0 0) meshes=(ExoGeometry1/body (19).stl)
    Body Body20: mass=0 mass_center=(0.2109538 0.34946 0) inertia=(0 0 0 0 0 0) meshes=(ExoGeometry1/body (20).stl)
    Body Body21: mass=0 mass_center=(0.2109538 0.34946 0) inertia=(0 0 0 0 0 0) meshes=(ExoGeometry1/body (21).stl)
    Body Body22: mass=0 mass_center=(0.2109538 0.34946 0) inertia=(0 0 0 0 0 0) meshes=(ExoGeometry1/body (22).stl)
    Body Body23: mass=0 mass_center=(0.2109538 0.34946 0) inertia=(0 0 0 0 0 0) meshes=(ExoGeometry1/body (23).stl)
    Body Body24: mass=0 mass_center=(0.2109538 0.34946 0) inertia=(0 0 0 0 0 0) meshes=(ExoGeometry1/body (24).stl)
    Body Body25: mass=0 mass_center=(0.2109538 0.34946 0) inertia=(0 0 0 0 0 0) meshes=(ExoGeometry1/body (25).stl)
    Body Body26: mass=1e-5 mass_center=(0.2109538 0.34946 0) inertia=(0 0 0 0 0 0) meshes=(ExoGeometry1/body (26).stl)
    Body Body27: mass=0.8 mass_center=(0.2988178 0.58846 1.465997) inertia=(0 0 0 0 0 0)
        meshes=(ExoGeometry1/body (27).stl)
    Body Body28: mass=0 mass_center=(0.2109538 0.34946 0) inertia=(0 0 0 0 0 0) meshes=(ExoGeometry1/body (28).stl)
    Body Body29: mass=0 mass_center=(0.2109538 0.34946 0) inertia=(0 0 0 0 0 0) meshes=(ExoGeometry1/body (29).stl)
    Body Body30: mass=0 mass_center=(0.2109538 0.34946 0) inertia=(0 0 0 0 0 0) meshes=(ExoGeometry1/body (30).stl)
    Body Body31: mass=0 mass_center=(0.2109538 0.34946 0) inertia=(0 0 0 0 0 0) meshes=(ExoGeometry1/body (31).stl)
    Body Body32: mass=0 mass_center=(0.2109538 0.34946 0) inertia=(0 0 0 0 0 0) meshes=(ExoGeometry1/body (32).stl)
    Body Body33: mass=0 mass_center=(0.2109538 0.34946 0) inertia=(0 0 0 0 0 0) meshes=(ExoGeometry1/body (33).stl)
    Body Body34: mass=2.4 mass_center=(0.3037848 0.58844 1.022111) inertia=(0 0 0 0 0 0)
        meshes=(ExoGeometry1/body (34).stl)
    Body Body35: mass=1e-5 mass_center=(0.2109538 0.34946 0) inertia=(0 0 0 0 0 0) meshes=(ExoGeometry1/body (35).stl)
    Body Body36: mass=2.3 mass_center=(0.2084538 0.479104 0.073808) inertia=(0 0 0 0 0 0)
        meshes=(ExoGeometry1/body (36).stl)
    Body Body37: mass=0 mass_center=(0.2109538 0.34946 0) inertia=(0 0 0 0 0 0) meshes=(ExoGeometry1/body (37).stl)
    Body Body38: mass=0 mass_center=(0.2109538 0.34946 0) inertia=(0 0 0 0 0 0) meshes=(ExoGeometry1/body (38).stl)
    Body Body39: mass=0 mass_center=(0.2109538 0.34946 0) inertia=(0 0 0 0 0 0) meshes=(ExoGeometry1/body (39).stl)
    Body Body40: mass=1e-5 mass_center=(0.2109538 0.34946 0) inertia=(0 0 0 0 0 0) meshes=(ExoGeometry1/body (40).stl)
    Body Body41: mass=0 mass_center=(0.2109538 0.34946 0) inertia=(0 0 0 0 0 0) meshes=(ExoGeometry1/body (41).stl)
    Body Body42: mass=2 mass_center=(0.3020888 0.111928 0.400193) inertia=(0 0 0 0 0 0)
        meshes=(ExoGeometry1/body (42).stl)
    Body Body43: mass=0 mass_center=(0.2109538 0.34946 0) inertia=(0 0 0 0 0 0) meshes=(ExoGeometry1/body (43).stl)
    Body Body44: mass=0 mass_center=(0.2109538 0.34946 0) inertia=(0 0 0 0 0 0) meshes=(ExoGeometry1/body (44).stl)
    Body Body45: mass=0 mass_center=(0.2109538 0.34946 0) inertia=(0 0 0 0 0 0) meshes=(ExoGeometry1/body (45).stl)
    Body Body46: mass=0 mass_center=(0.2109538 0.34946 0) inertia=(0 0 0 0 0 0) meshes=(ExoGeometry1/body (46).stl)
    Body Body47: mass=0 mass_center=(0.2109538 0.34946 0) inertia=(0 0 0 0 0 0) meshes=(ExoGeometry1/body (47).stl)
    Body Body48: mass=1e-5 mass_center=(0.2109538 0.34946 0) inertia=(0 0 0 0 0 0) meshes=(ExoGeometry1/body (48).stl)
    Body Body49: mass=0 mass_center=(0.2109538 0.34946 0) inertia=(0 0 0 0 0 0) meshes=(ExoGeometry1/body (49).stl)
    Body Body50: mass=0 mass_center=(0.2109538 0.34946 0) inertia=(0 0 0 0 0 0) meshes=(ExoGeometry1/body (50).stl)
    Body Body51: mass=0 mass_center=(0.2109538 0.34946 0) inertia=(0 0 0 0 0 0) meshes=(ExoGeometry1/body (51).stl)
    Body Body52: mass=0 mass_center=(0.2109538 0.34946 0) inertia=(0 0 0 0 0 0) meshes=(ExoGeometry1/body (52).stl)
    Body Body53: mass=0 mass_center=(0.2109538 0.34946 0) inertia=(0 0 0 0 0 0) meshes=(ExoGeometry1/body (53).stl)
    Body Body54: mass=0 mass_center=(0.2109538 0.34946 0) inertia=(0 0 0 0 0 0) meshes=(ExoGeometry1/body (54).stl)
    Body Body55: mass=1e-5 mass_center=(0.2109538 0.34946 0) inertia=(0 0 0 0 0 0) meshes=(ExoGeometry1/body (55).stl)
    Body Body56: mass=0.8 mass_center=(0.2988178 0.11046 1.465997) inertia=(0 0 0 0 0 0)
        meshes=(ExoGeometry1/body (56).stl)
    Body Body57: mass=0 mass_center=(0.2109538 0.34946 0) inertia=(0 0 0 0 0 0) meshes=(ExoGeometry1/body (57).stl)
    Body Body58: mass=0 mass_center=(0.2109538 0.34946 0) inertia=(0 0 0 0 0 0) meshes=(ExoGeometry1/body (58).stl)
    Body backpack1: mass=0 mass_center=(0 0 0) inertia=(0 0 0 0 0 0)
      Brick backpack1_geom_1: socket_frame_connectee_name=../LoadCarryingExoskeleton_by_Moran/backpack1
          half_lengths=(0.008 0.18 0.2)
    Body bcp: mass=0 mass_center=(0 0 0) inertia=(0 0 0 0 0 0)
    Body bcb: mass=0 mass_center=(0 0 0) inertia=(0 0 0 0 0 0)
    Body fch_r: mass=0 mass_center=(0 0 0) inertia=(0 0 0 0 0 0)
    Body fce_r: mass=0 mass_center=(0 0 0) inertia=(0 0 0 0 0 0)
    Body fch_l: mass=0 mass_center=(0 0 0) inertia=(0 0 0 0 0 0)
    Body fce_l: mass=0 mass_center=(0 0 0) inertia=(0 0 0 0 0 0)
  JointSet:
    CustomJoint ground_pelvis: socket_parent_frame_connectee_name=../ground socket_child_frame_connectee_name=../pelvis
      Coordinate pelvis_tilt: default_value=0 range=(-1.570796 1.570796) clamped=false locked=true
      Coordinate pelvis_list: default_value=0 range=(-1.570796 1.570796) clamped=false locked=true
      Coordinate pelvis_rotation: default_value=0 range=(-1.570796 1.570796) clamped=false locked=true
      Coordinate pelvis_tx: default_value=0 range=(-5 5) clamped=false locked=true
      Coordinate pelvis_ty: default_value=1.0194 range=(-1 2) clamped=false
      Coordinate pelvis_tz: default_value=0 range=(-3 3) clamped=false locked=true
      SpatialTransform:
        TransformAxis rotation1: coordinates=pelvis_tilt axis=(0 0 1) LinearFunction(coefficients=1 0)
        TransformAxis rotation2: coordinates=pelvis_list axis=(1 0 0) LinearFunction(coefficients=1 0)
        TransformAxis rotation3: coordinates=pelvis_rotation axis=(0 1 0) LinearFunction(coefficients=1 0)
        TransformAxis translation1: coordinates=pelvis_tx axis=(1 0 0) LinearFunction(coefficients=1 0)
        TransformAxis translation2: coordinates=pelvis_ty axis=(0 1 0) LinearFunction(coefficients=1 0)
        TransformAxis translation3: coordinates=pelvis_tz axis=(0 0 1) LinearFunction(coefficients=1 0)
    CustomJoint hip_r: socket_parent_frame_connectee_name=pelvis_offset socket_child_frame_connectee_name=../femur_r
      Coordinate hip_flexion_r: default_value=0 range=(-2.094395 2.094395) clamped=false locked=true
      Coordinate hip_adduction_r: default_value=0 range=(-2.094395 2.094395) clamped=false locked=true
      Coordinate hip_rotation_r: default_value=0 range=(-2.094395 2.094395) clamped=false locked=true
      PhysicalOffsetFrame pelvis_offset: socket_parent_connectee_name=../../pelvis
          translation=(-0.0724376 -0.06772454 0.08555218)
      SpatialTransform: axes_held_at_zero=(translation1 translation2 translation3)
        TransformAxis rotation1: coordinates=hip_flexion_r axis=(0 0 1) LinearFunction(coefficients=1 0)
        TransformAxis rotation2: coordinates=hip_adduction_r axis=(1 0 0) LinearFunction(coefficients=1 0)
        TransformAxis rotation3: coordinates=hip_rotation_r axis=(0 1 0) LinearFunction(coefficients=1 0)
    CustomJoint knee_r: socket_parent_frame_connectee_name=../femur_r socket_child_frame_connectee_name=../tibia_r
      Coordinate knee_angle_r: default_value=0 range=(-2.094395 0.1745329) clamped=false locked=true
      SpatialTransform: axes_held_at_zero=(rotation2 rotation3 translation3)
        TransformAxis rotation1: coordinates=knee_angle_r axis=(0 0 1) LinearFunction(coefficients=1 0)
        TransformAxis translation1: coordinates=knee_angle_r axis=(1 0 0)
          MultiplierFunction: scale=1.14724
            SimmSpline: x=(-2.0944 -1.74533 -1.39626 -1.0472 -0.698132 -0.349066 -0.174533 0.197344 0.337395 0.490178 1.52146 2.0944)
                y=(-0.0032 0.00179 0.00411 0.0041 0.00212 -0.001 -0.0031 -0.005227 -0.005435 -0.005574 -0.005435 -0.00525)
        TransformAxis translation2: coordinates=knee_angle_r axis=(0 1 0)
          MultiplierFunction: scale=1.14724
            SimmSpline: x=(-2.0944 -1.22173 -0.523599 -0.349066 -0.174533 0.159149 2.0944)
                y=(-0.4226 -0.4082 -0.399 -0.3976 -0.3966 -0.395264 -0.396)
    CustomJoint ankle_r: socket_parent_frame_connectee_name=tibia_r_offset socket_child_frame_connectee_name=../talus_r
      Coordinate ankle_angle_r: default_value=0 range=(-1.570796 1.570796) clamped=false locked=true
      PhysicalOffsetFrame tibia_r_offset: socket_parent_connectee_name=../../tibia_r translation=(0 -0.4250649 0)
      SpatialTransform: axes_held_at_zero=(rotation2 rotation3 translation1 translation2 translation3)
        TransformAxis rotation1: coordinates=ankle_angle_r axis=(0 0 1) LinearFunction(coefficients=1 0)
    CustomJoint subtalar_r: socket_parent_frame_connectee_name=talus_r_offset
        socket_child_frame_connectee_name=../calcn_r
      Coordinate subtalar_angle_r: default_value=0 range=(-1.570796 1.570796) clamped=false locked=true
      PhysicalOffsetFrame talus_r_offset: socket_parent_connectee_name=../../talus_r
          translation=(-0.05432871 -0.04673138 0.008822706)
      SpatialTransform: axes_held_at_zero=(rotation2 rotation3 translation1 translation2 translation3)
        TransformAxis rotation1: coordinates=subtalar_angle_r axis=(0.7871796 0.6047475 -0.1209495)
            LinearFunction(coefficients=1 0)
    CustomJoint mtp_r: socket_parent_frame_connectee_name=calcn_r_offset socket_child_frame_connectee_name=../toes_r
      Coordinate mtp_angle_r: default_value=0 range=(-1.570796 1.570796) clamped=false locked=true
      PhysicalOffsetFrame calcn_r_offset: socket_parent_connectee_name=../../calcn_r
          translation=(0.1836428 -0.00205417 0.001109252)
      SpatialTransform: axes_held_at_zero=(rotation2 rotation3 translation1 translation2 translation3)
        TransformAxis rotation1: coordinates=mtp_angle_r axis=(0 0 1) LinearFunction(coefficients=1 0)
    CustomJoint hip_l: socket_parent_frame_connectee_name=pelvis_offset socket_child_frame_connectee_name=../femur_l
      Coordinate hip_flexion_l: default_value=0 range=(-2.094395 2.094395) clamped=false locked=true
      Coordinate hip_adduction_l: default_value=0 range=(-2.094395 2.094395) clamped=false locked=true
      Coordinate hip_rotation_l: default_value=0 range=(-2.094395 2.094395) clamped=false locked=true
      PhysicalOffsetFrame pelvis_offset: socket_parent_connectee_name=../../pelvis
          translation=(-0.0724376 -0.06772454 -0.08555218)
      SpatialTransform: axes_held_at_zero=(translation1 translation2 translation3)
        TransformAxis rotation1: coordinates=hip_flexion_l axis=(0 0 1) LinearFunction(coefficients=1 0)
        TransformAxis rotation2: coordinates=hip_adduction_l axis=(-1 0 0) LinearFunction(coefficients=1 0)
        TransformAxis rotation3: coordinates=hip_rotation_l axis=(0 -1 0) LinearFunction(coefficients=1 0)
    CustomJoint knee_l: socket_parent_frame_connectee_name=../femur_l socket_child_frame_connectee_name=../tibia_l
      Coordinate knee_angle_l: default_value=0 range=(-2.094395 0.1745329) clamped=false locked=true
      SpatialTransform: axes_held_at_zero=(rotation2 rotation3 translation3)
        TransformAxis rotation1: coordinates=knee_angle_l axis=(0 0 1) LinearFunction(coefficients=1 0)
        TransformAxis translation1: coordinates=knee_angle_l axis=(1 0 0)
          MultiplierFunction: scale=1.14724
            SimmSpline: x=(-2.0944 -1.74533 -1.39626 -1.0472 -0.698132 -0.349066 -0.174533 0.197344 0.337395 0.490178 1.52146 2.0944)
                y=(-0.0032 0.00179 0.00411 0.0041 0.00212 -0.001 -0.0031 -0.005227 -0.005435 -0.005574 -0.005435 -0.00525)
        TransformAxis translation2: coordinates=knee_angle_l axis=(0 1 0)
          MultiplierFunction: scale=1.14724
            SimmSpline: x=(-2.0944 -1.22173 -0.523599 -0.349066 -0.174533 0.159149 2.0944)
                y=(-0.4226 -0.4082 -0.399 -0.3976 -0.3966 -0.395264 -0.396)
    CustomJoint ankle_l: socket_parent_frame_connectee_name=tibia_l_offset socket_child_frame_connectee_name=../talus_l
      Coordinate ankle_angle_l: default_value=0 range=(-1.047198 1.047198) clamped=false locked=true
      PhysicalOffsetFrame tibia_l_offset: socket_parent_connectee_name=../../tibia_l translation=(0 -0.4250649 0)
      SpatialTransform: axes_held_at_zero=(rotation2 rotation3 translation1 translation2 translation3)
        TransformAxis rotation1: coordinates=ankle_angle_l axis=(0 0 1) LinearFunction(coefficients=1 0)
    CustomJoint subtalar_l: socket_parent_frame_connectee_name=talus_l_offset
        socket_child_frame_connectee_name=../calcn_l
      Coordinate subtalar_angle_l: default_value=0 range=(-1.570796 1.570796) clamped=false locked=true
      PhysicalOffsetFrame talus_l_offset: socket_parent_connectee_name=../../talus_l
          translation=(-0.05432871 -0.04673138 -0.008822706)
      SpatialTransform: axes_held_at_zero=(rotation2 rotation3 translation1 translation2 translation3)
        TransformAxis rotation1: coordinates=subtalar_angle_l axis=(-0.7871796 -0.6047475 -0.1209495)
            LinearFunction(coefficients=1 0)
    CustomJoint mtp_l: socket_parent_frame_connectee_name=calcn_l_offset socket_child_frame_connectee_name=../toes_l
      Coordinate mtp_angle_l: default_value=0 range=(-1.047198 1.047198) clamped=false locked=true
      PhysicalOffsetFrame calcn_l_offset: socket_parent_connectee_name=../../calcn_l
          translation=(0.1836428 -0.00205417 -0.001109252)
      SpatialTransform: axes_held_at_zero=(rotation2 rotation3 translation1 translation2 translation3)
        TransformAxis rotation1: coordinates=mtp_angle_l axis=(0 0 1) LinearFunction(coefficients=1 0)
    CustomJoint back: socket_parent_frame_connectee_name=pelvis_offset socket_child_frame_connectee_name=../torso
      Coordinate lumbar_extension: default_value=0 range=(-1.570796 1.570796) clamped=false locked=true
      Coordinate lumbar_bending: default_value=0 range=(-1.570796 1.570796) clamped=false locked=true
      Coordinate lumbar_rotation: default_value=0 range=(-1.570796 1.570796) clamped=false locked=true
      PhysicalOffsetFrame pelvis_offset: socket_parent_connectee_name=../../pelvis
          translation=(-0.1031749 0.08350303 0)
      SpatialTransform: axes_held_at_zero=(translation1 translation2 translation3)
        TransformAxis rotation1: coordinates=lumbar_extension axis=(0 0 1) LinearFunction(coefficients=1 0)
        TransformAxis rotation2: coordinates=lumbar_bending axis=(1 0 0) LinearFunction(coefficients=1 0)
        TransformAxis rotation3: coordinates=lumbar_rotation axis=(0 1 0) LinearFunction(coefficients=1 0)
    FreeJoint jpb7: socket_parent_frame_connectee_name=pelvis_offset socket_child_frame_connectee_name=Body7_offset
      Coordinate jpb7_coord_0: locked=true
      Coordinate jpb7_coord_1: locked=true
      Coordinate jpb7_coord_2
      Coordinate jpb7_coord_3
      Coordinate jpb7_coord_4
      Coordinate jpb7_coord_5: locked=true
      PhysicalOffsetFrame pelvis_offset: socket_parent_connectee_name=../../LoadCarryingExoskeleton_by_Moran/pelvis
          translation=(-0.2 0.2 0)
      PhysicalOffsetFrame Body7_offset: socket_parent_connectee_name=../../LoadCarryingExoskeleton_by_Moran/Body7
          translation=(0.21095 0.19606 0.07381) orientation=(1.570796 0 3.141593) [radians]
    WeldJoint jpb36: socket_parent_frame_connectee_name=Body7_offset socket_child_frame_connectee_name=Body36_offset
      PhysicalOffsetFrame Body7_offset: socket_parent_connectee_name=../../LoadCarryingExoskeleton_by_Moran/Body7
          translation=(0 0 0)
      PhysicalOffsetFrame Body36_offset: socket_parent_connectee_name=../../LoadCarryingExoskeleton_by_Moran/Body36
          translation=(0 0.3068 0)
    WeldJoint jb7b39: socket_parent_frame_connectee_name=Body7_offset socket_child_frame_connectee_name=Body39_offset
      PhysicalOffsetFrame Body7_offset: socket_parent_connectee_name=../../LoadCarryingExoskeleton_by_Moran/Body7
          translation=(0 0 0)
      PhysicalOffsetFrame Body39_offset: socket_parent_connectee_name=../../LoadCarryingExoskeleton_by_Moran/Body39
          translation=(0 0 0)
    PinJoint jb39b40: socket_parent_frame_connectee_name=Body39_offset socket_child_frame_connectee_name=Body40_offset
      Coordinate jb39b40_coord_0: locked=true
      PhysicalOffsetFrame Body39_offset: socket_parent_connectee_name=../../LoadCarryingExoskeleton_by_Moran/Body39
          translation=(0.1829538 0.10946 0.07380814) orientation=(0 1.570796 0)
      PhysicalOffsetFrame Body40_offset: socket_parent_connectee_name=../../LoadCarryingExoskeleton_by_Moran/Body40
          translation=(0.1829538 0.10946 0.07380814) orientation=(0 1.570796 0)
    WeldJoint jb40b8: socket_parent_frame_connectee_name=Body40_offset socket_child_frame_connectee_name=Body8_offset
      PhysicalOffsetFrame Body40_offset: socket_parent_connectee_name=../../LoadCarryingExoskeleton_by_Moran/Body40
          translation=(0 0 0)
      PhysicalOffsetFrame Body8_offset: socket_parent_connectee_name=../../LoadCarryingExoskeleton_by_Moran/Body8
          translation=(0 0 0)
    WeldJoint jb8b47: socket_parent_frame_connectee_name=Body8_offset socket_child_frame_connectee_name=Body47_offset
      PhysicalOffsetFrame Body8_offset: socket_parent_connectee_name=../../LoadCarryingExoskeleton_by_Moran/Body8
          translation=(0 0 0)
      PhysicalOffsetFrame Body47_offset: socket_parent_connectee_name=../../LoadCarryingExoskeleton_by_Moran/Body47
          translation=(0 0 0)
    PinJoint jb47b48: socket_parent_frame_connectee_name=Body47_offset socket_child_frame_connectee_name=Body48_offset
      Coordinate jb47b48_coord_0: locked=true
      PhysicalOffsetFrame Body47_offset: socket_parent_connectee_name=../../LoadCarryingExoskeleton_by_Moran/Body47
          translation=(0.3020887 0.10946 0.04580815)
      PhysicalOffsetFrame Body48_offset: socket_parent_connectee_name=../../LoadCarryingExoskeleton_by_Moran/Body48
          translation=(0.3020887 0.10946 0.04580815)
    WeldJoint jb48b9: socket_parent_frame_connectee_name=Body48_offset socket_child_frame_connectee_name=Body9_offset
      PhysicalOffsetFrame Body48_offset: socket_parent_connectee_name=../../LoadCarryingExoskeleton_by_Moran/Body48
          translation=(0 0 0)
      PhysicalOffsetFrame Body9_offset: socket_parent_connectee_name=../../LoadCarryingExoskeleton_by_Moran/Body9
          translation=(0 0 0)
    WeldJoint jb9b41: socket_parent_frame_connectee_name=Body9_offset socket_child_frame_connectee_name=Body41_offset
      PhysicalOffsetFrame Body9_offset: socket_parent_connectee_name=../../LoadCarryingExoskeleton_by_Moran/Body9
          translation=(0 0 0)
      PhysicalOffsetFrame Body41_offset: socket_parent_connectee_name=../../LoadCarryingExoskeleton_by_Moran/Body41
          translation=(0 0 0)
    PinJoint jb41b42: socket_parent_frame_connectee_name=Body41_offset socket_child_frame_connectee_name=Body42_offset
      Coordinate jb41b42_coord_0: default_value=0.44625
      PhysicalOffsetFrame Body41_offset: socket_parent_connectee_name=../../LoadCarryingExoskeleton_by_Moran/Body41
          translation=(0.3020887 0.08646 0.135992) orientation=(-1.570796 0 0)
      PhysicalOffsetFrame Body42_offset: socket_parent_connectee_name=../../LoadCarryingExoskeleton_by_Moran/Body42
          translation=(0.3020887 0.08646 0.135992) orientation=(-1.570796 0 0)
    WeldJoint jb42b55: socket_parent_frame_connectee_name=Body42_offset socket_child_frame_connectee_name=Body55_offset
      PhysicalOffsetFrame Body42_offset: socket_parent_connectee_name=../../LoadCarryingExoskeleton_by_Moran/Body42
          translation=(0 0 0)
      PhysicalOffsetFrame Body55_offset: socket_parent_connectee_name=../../LoadCarryingExoskeleton_by_Moran/Body55
          translation=(0 0 0)
    WeldJoint jb55b43: socket_parent_frame_connectee_name=Body55_offset socket_child_frame_connectee_name=Body43_offset
      PhysicalOffsetFrame Body55_offset: socket_parent_connectee_name=../../LoadCarryingExoskeleton_by_Moran/Body55
          translation=(0 0 0)
      PhysicalOffsetFrame Body43_offset: socket_parent_connectee_name=../../LoadCarryingExoskeleton_by_Moran/Body43
          translation=(0 0 0)
    WeldJoint jb43b44: socket_parent_frame_connectee_name=Body43_offset socket_child_frame_connectee_name=Body44_offset
      PhysicalOffsetFrame Body43_offset: socket_parent_connectee_name=../../LoadCarryingExoskeleton_by_Moran/Body43
          translation=(0 0 0)
      PhysicalOffsetFrame Body44_offset: socket_parent_connectee_name=../../LoadCarryingExoskeleton_by_Moran/Body44
          translation=(0 0 0)
    WeldJoint jb44b1: socket_parent_frame_connectee_name=Body44_offset socket_child_frame_connectee_name=Body1_offset
      PhysicalOffsetFrame Body44_offset: socket_parent_connectee_name=../../LoadCarryingExoskeleton_by_Moran/Body44
          translation=(0 0 0)
      PhysicalOffsetFrame Body1_offset: socket_parent_connectee_name=../../LoadCarryingExoskeleton_by_Moran/Body1
          translation=(0 0 0)
    WeldJoint jb1b50: socket_parent_frame_connectee_name=Body1_offset socket_child_frame_connectee_name=Body50_offset
      PhysicalOffsetFrame Body1_offset: socket_parent_connectee_name=../../LoadCarryingExoskeleton_by_Moran/Body1
          translation=(0 0 0)
      PhysicalOffsetFrame Body50_offset: socket_parent_connectee_name=../../LoadCarryingExoskeleton_by_Moran/Body50
          translation=(0 0 0)
    WeldJoint jb50b57: socket_parent_frame_connectee_name=Body50_offset socket_child_frame_connectee_name=Body57_offset
      PhysicalOffsetFrame Body50_offset: socket_parent_connectee_name=../../LoadCarryingExoskeleton_by_Moran/Body50
          translation=(0 0 0)
      PhysicalOffsetFrame Body57_offset: socket_parent_connectee_name=../../LoadCarryingExoskeleton_by_Moran/Body57
          translation=(0 0 0)
    WeldJoint jb9b45: socket_parent_frame_connectee_name=Body9_offset socket_child_frame_connectee_name=Body45_offset
      PhysicalOffsetFrame Body9_offset: socket_parent_connectee_name=../../LoadCarryingExoskeleton_by_Moran/Body9
          translation=(0 0 0)
      PhysicalOffsetFrame Body45_offset: socket_parent_connectee_name=../../LoadCarryingExoskeleton_by_Moran/Body45
          translation=(0 0 0)
    WeldJoint jb45b46: socket_parent_frame_connectee_name=Body45_offset socket_child_frame_connectee_name=Body46_offset
      PhysicalOffsetFrame Body45_offset: socket_parent_connectee_name=../../LoadCarryingExoskeleton_by_Moran/Body45
          translation=(0 0 0)
      PhysicalOffsetFrame Body46_offset: socket_parent_connectee_name=../../LoadCarryingExoskeleton_by_Moran/Body46
          translation=(0 0 0)
    WeldJoint jb46b2: socket_parent_frame_connectee_name=Body46_offset socket_child_frame_connectee_name=Body2_offset
      PhysicalOffsetFrame Body46_offset: socket_parent_connectee_name=../../LoadCarryingExoskeleton_by_Moran/Body46
          translation=(0 0 0)
      PhysicalOffsetFrame Body2_offset: socket_parent_connectee_name=../../LoadCarryingExoskeleton_by_Moran/Body2
          translation=(0 0 0)
    WeldJoint jb2b51: socket_parent_frame_connectee_name=Body2_offset socket_child_frame_connectee_name=Body51_offset
      PhysicalOffsetFrame Body2_offset: socket_parent_connectee_name=../../LoadCarryingExoskeleton_by_Moran/Body2
          translation=(0 0 0)
      PhysicalOffsetFrame Body51_offset: socket_parent_connectee_name=../../LoadCarryingExoskeleton_by_Moran/Body51
          translation=(0 0 0)
    WeldJoint jb55b58: socket_parent_frame_connectee_name=Body55_offset socket_child_frame_connectee_name=Body58_offset
      PhysicalOffsetFrame Body55_offset: socket_parent_connectee_name=../../LoadCarryingExoskeleton_by_Moran/Body55
          translation=(0 0 0)
      PhysicalOffsetFrame Body58_offset: socket_parent_connectee_name=../../LoadCarryingExoskeleton_by_Moran/Body58
          translation=(0 0 0)
    WeldJoint jb58b53: socket_parent_frame_connectee_name=Body58_offset socket_child_frame_connectee_name=Body53_offset
      PhysicalOffsetFrame Body58_offset: socket_parent_connectee_name=../../LoadCarryingExoskeleton_by_Moran/Body58
          translation=(0 0 0)
      PhysicalOffsetFrame Body53_offset: socket_parent_connectee_name=../../LoadCarryingExoskeleton_by_Moran/Body53
          translation=(0 0 0)
    WeldJoint jb53b52: socket_parent_frame_connectee_name=Body53_offset socket_child_frame_connectee_name=Body52_offset
      PhysicalOffsetFrame Body53_offset: socket_parent_connectee_name=../../LoadCarryingExoskeleton_by_Moran/Body53
          translation=(0 0 0)
      PhysicalOffsetFrame Body52_offset: socket_parent_connectee_name=../../LoadCarryingExoskeleton_by_Moran/Body52
          translation=(0 0 0)
    WeldJoint jb52b3: socket_parent_frame_connectee_name=Body52_offset socket_child_frame_connectee_name=Body3_offset
      PhysicalOffsetFrame Body52_offset: socket_parent_connectee_name=../../LoadCarryingExoskeleton_by_Moran/Body52
          translation=(0 0 0)
      PhysicalOffsetFrame Body3_offset: socket_parent_connectee_name=../../LoadCarryingExoskeleton_by_Moran/Body3
          translation=(0 0 0)
    PinJoint jb55b5: socket_parent_frame_connectee_name=Body55_offset socket_child_frame_connectee_name=Body5_offset
      Coordinate jb55b5_coord_0: default_value=-1.0652
      PhysicalOffsetFrame Body55_offset: socket_parent_connectee_name=../../LoadCarryingExoskeleton_by_Moran/Body55
          translation=(0.3023 0.11046 0.7559875) orientation=(-1.570796 0 0)
      PhysicalOffsetFrame Body5_offset: socket_parent_connectee_name=../../LoadCarryingExoskeleton_by_Moran/Body5
          translation=(0.3023 0.11046 0.7559875) orientation=(-1.570796 0 0)
    WeldJoint jb5b54: socket_parent_frame_connectee_name=Body5_offset socket_child_frame_connectee_name=Body54_offset
      PhysicalOffsetFrame Body5_offset: socket_parent_connectee_name=../../LoadCarryingExoskeleton_by_Moran/Body5
          translation=(0 0 0)
      PhysicalOffsetFrame Body54_offset: socket_parent_connectee_name=../../LoadCarryingExoskeleton_by_Moran/Body54
          translation=(0 0 0)
    WeldJoint jb5b4: socket_parent_frame_connectee_name=Body5_offset socket_child_frame_connectee_name=Body4_offset
      PhysicalOffsetFrame Body5_offset: socket_parent_connectee_name=../../LoadCarryingExoskeleton_by_Moran/Body5
          translation=(0 0 0)
      PhysicalOffsetFrame Body4_offset: socket_parent_connectee_name=../../LoadCarryingExoskeleton_by_Moran/Body4
          translation=(0 0 0)
    PinJoint jb5b6: socket_parent_frame_connectee_name=Body5_offset socket_child_frame_connectee_name=Body6_offset
      Coordinate jb5b6_coord_0: default_value=0.61902
      PhysicalOffsetFrame Body5_offset: socket_parent_connectee_name=../../LoadCarryingExoskeleton_by_Moran/Body5
          translation=(0.3020887 0.11046 1.405992) orientation=(-1.570796 0 0)
      PhysicalOffsetFrame Body6_offset: socket_parent_connectee_name=../../LoadCarryingExoskeleton_by_Moran/Body6
          translation=(0.3020887 0.11046 1.405992) orientation=(-1.570796 0 0)
    WeldJoint jb6b49: socket_parent_frame_connectee_name=Body6_offset socket_child_frame_connectee_name=Body49_offset
      PhysicalOffsetFrame Body6_offset: socket_parent_connectee_name=../../LoadCarryingExoskeleton_by_Moran/Body6
          translation=(0 0 0)
      PhysicalOffsetFrame Body49_offset: socket_parent_connectee_name=../../LoadCarryingExoskeleton_by_Moran/Body49
          translation=(0 0 0)
    PinJoint jb6b56: socket_parent_frame_connectee_name=Body6_offset socket_child_frame_connectee_name=Body56_offset
      Coordinate jb6b56_coord_0: locked=true
      PhysicalOffsetFrame Body6_offset: socket_parent_connectee_name=../../LoadCarryingExoskeleton_by_Moran/Body6
          translation=(0.3100887 0.11046 1.438992) orientation=(0 1.570796 0)
      PhysicalOffsetFrame Body56_offset: socket_parent_connectee_name=../../LoadCarryingExoskeleton_by_Moran/Body56
          translation=(0.3100887 0.11046 1.438992) orientation=(0 1.570796 0)
    WeldJoint jb36b10: socket_parent_frame_connectee_name=Body36_offset socket_child_frame_connectee_name=Body10_offset
      PhysicalOffsetFrame Body36_offset: socket_parent_connectee_name=../../LoadCarryingExoskeleton_by_Moran/Body36
          translation=(0 0 0)
      PhysicalOffsetFrame Body10_offset: socket_parent_connectee_name=../../LoadCarryingExoskeleton_by_Moran/Body10
          translation=(0 0 0)
    PinJoint jb10b11: socket_parent_frame_connectee_name=Body10_offset socket_child_frame_connectee_name=Body11_offset
      Coordinate jb10b11_coord_0: locked=true
      PhysicalOffsetFrame Body10_offset: socket_parent_connectee_name=../../LoadCarryingExoskeleton_by_Moran/Body10
          translation=(0.1829538 0.58946 0.07380814) orientation=(0 1.570796 0)
      PhysicalOffsetFrame Body11_offset: socket_parent_connectee_name=../../LoadCarryingExoskeleton_by_Moran/Body11
          translation=(0.1829538 0.58946 0.07380814) orientation=(0 1.570796 0)
    WeldJoint jb11b37: socket_parent_frame_connectee_name=Body11_offset socket_child_frame_connectee_name=Body37_offset
      PhysicalOffsetFrame Body11_offset: socket_parent_connectee_name=../../LoadCarryingExoskeleton_by_Moran/Body11
          translation=(0 0 0)
      PhysicalOffsetFrame Body37_offset: socket_parent_connectee_name=../../LoadCarryingExoskeleton_by_Moran/Body37
          translation=(0 0 0)
    WeldJoint jb37b18: socket_parent_frame_connectee_name=Body37_offset socket_child_frame_connectee_name=Body18_offset
      PhysicalOffsetFrame Body37_offset: socket_parent_connectee_name=../../LoadCarryingExoskeleton_by_Moran/Body37
          translation=(0 0 0)
      PhysicalOffsetFrame Body18_offset: socket_parent_connectee_name=../../LoadCarryingExoskeleton_by_Moran/Body18
          translation=(0 0 0)
    PinJoint jb18b19: socket_parent_frame_connectee_name=Body18_offset socket_child_frame_connectee_name=Body19_offset
      Coordinate jb18b19_coord_0: locked=true
      PhysicalOffsetFrame Body18_offset: socket_parent_connectee_name=../../LoadCarryingExoskeleton_by_Moran/Body18
          translation=(0.3020887 0.58946 0.04580815)
      PhysicalOffsetFrame Body19_offset: socket_parent_connectee_name=../../LoadCarryingExoskeleton_by_Moran/Body19
          translation=(0.3020887 0.58946 0.04580815)
    WeldJoint jb19b38: socket_parent_frame_connectee_name=Body19_offset socket_child_frame_connectee_name=Body38_offset
      PhysicalOffsetFrame Body19_offset: socket_parent_connectee_name=../../LoadCarryingExoskeleton_by_Moran/Body19
          translation=(0 0 0)
      PhysicalOffsetFrame Body38_offset: socket_parent_connectee_name=../../LoadCarryingExoskeleton_by_Moran/Body38
          translation=(0 0 0)
    WeldJoint jb38b12: socket_parent_frame_connectee_name=Body38_offset socket_child_frame_connectee_name=Body12_offset
      PhysicalOffsetFrame Body38_offset: socket_parent_connectee_name=../../LoadCarryingExoskeleton_by_Moran/Body38
          translation=(0 0 0)
      PhysicalOffsetFrame Body12_offset: socket_parent_connectee_name=../../LoadCarryingExoskeleton_by_Moran/Body12
          translation=(0 0 0)
    PinJoint jb12b13: socket_parent_frame_connectee_name=Body12_offset socket_child_frame_connectee_name=Body13_offset
      Coordinate jb12b13_coord_0: default_value=-0.44624
      PhysicalOffsetFrame Body12_offset: socket_parent_connectee_name=../../LoadCarryingExoskeleton_by_Moran/Body12
          translation=(0.3020887 0.61246 0.135992) orientation=(1.570796 0 0)
      PhysicalOffsetFrame Body13_offset: socket_parent_connectee_name=../../LoadCarryingExoskeleton_by_Moran/Body13
          translation=(0.3020887 0.61246 0.135992) orientation=(1.570796 0 0)
    WeldJoint jb19b16: socket_parent_frame_connectee_name=Body19_offset socket_child_frame_connectee_name=Body16_offset
      PhysicalOffsetFrame Body19_offset: socket_parent_connectee_name=../../LoadCarryingExoskeleton_by_Moran/Body19
          translation=(0 0 0)
      PhysicalOffsetFrame Body16_offset: socket_parent_connectee_name=../../LoadCarryingExoskeleton_by_Moran/Body16
          translation=(0 0 0)
    WeldJoint jb16b17: socket_parent_frame_connectee_name=Body16_offset socket_child_frame_connectee_name=Body17_offset
      PhysicalOffsetFrame Body16_offset: socket_parent_connectee_name=../../LoadCarryingExoskeleton_by_Moran/Body16
          translation=(0 0 0)
      PhysicalOffsetFrame Body17_offset: socket_parent_connectee_name=../../LoadCarryingExoskeleton_by_Moran/Body17
          translation=(0 0 0)
    WeldJoint jb13b26: socket_parent_frame_connectee_name=Body13_offset socket_child_frame_connectee_name=Body26_offset
      PhysicalOffsetFrame Body13_offset: socket_parent_connectee_name=../../LoadCarryingExoskeleton_by_Moran/Body13
          translation=(0 0 0)
      PhysicalOffsetFrame Body26_offset: socket_parent_connectee_name=../../LoadCarryingExoskeleton_by_Moran/Body26
          translation=(0 0 0)
    WeldJoint jb17b31: socket_parent_frame_connectee_name=Body17_offset socket_child_frame_connectee_name=Body31_offset
      PhysicalOffsetFrame Body17_offset: socket_parent_connectee_name=../../LoadCarryingExoskeleton_by_Moran/Body17
          translation=(0 0 0)
      PhysicalOffsetFrame Body31_offset: socket_parent_connectee_name=../../LoadCarryingExoskeleton_by_Moran/Body31
          translation=(0 0 0)
    WeldJoint jb26b14: socket_parent_frame_connectee_name=Body26_offset socket_child_frame_connectee_name=Body14_offset
      PhysicalOffsetFrame Body26_offset: socket_parent_connectee_name=../../LoadCarryingExoskeleton_by_Moran/Body26
          translation=(0 0 0)
      PhysicalOffsetFrame Body14_offset: socket_parent_connectee_name=../../LoadCarryingExoskeleton_by_Moran/Body14
          translation=(0 0 0)
    WeldJoint jb14b15: socket_parent_frame_connectee_name=Body14_offset socket_child_frame_connectee_name=Body15_offset
      PhysicalOffsetFrame Body14_offset: socket_parent_connectee_name=../../LoadCarryingExoskeleton_by_Moran/Body14
          translation=(0 0 0)
      PhysicalOffsetFrame Body15_offset: socket_parent_connectee_name=../../LoadCarryingExoskeleton_by_Moran/Body15
          translation=(0 0 0)
    WeldJoint jb31b22: socket_parent_frame_connectee_name=Body31_offset socket_child_frame_connectee_name=Body22_offset
      PhysicalOffsetFrame Body31_offset: socket_parent_connectee_name=../../LoadCarryingExoskeleton_by_Moran/Body31
          translation=(0 0 0)
      PhysicalOffsetFrame Body22_offset: socket_parent_connectee_name=../../LoadCarryingExoskeleton_by_Moran/Body22
          translation=(0 0 0)
    WeldJoint jb26b29: socket_parent_frame_connectee_name=Body26_offset socket_child_frame_connectee_name=Body29_offset
      PhysicalOffsetFrame Body26_offset: socket_parent_connectee_name=../../LoadCarryingExoskeleton_by_Moran/Body26
          translation=(0 0 0)
      PhysicalOffsetFrame Body29_offset: socket_parent_connectee_name=../../LoadCarryingExoskeleton_by_Moran/Body29
          translation=(0 0 0)
    WeldJoint jb15b30: socket_parent_frame_connectee_name=Body15_offset socket_child_frame_connectee_name=Body30_offset
      PhysicalOffsetFrame Body15_offset: socket_parent_connectee_name=../../LoadCarryingExoskeleton_by_Moran/Body15
          translation=(0 0 0)
      PhysicalOffsetFrame Body30_offset: socket_parent_connectee_name=../../LoadCarryingExoskeleton_by_Moran/Body30
          translation=(0 0 0)
    WeldJoint jb30b21: socket_parent_frame_connectee_name=Body30_offset socket_child_frame_connectee_name=Body21_offset
      PhysicalOffsetFrame Body30_offset: socket_parent_connectee_name=../../LoadCarryingExoskeleton_by_Moran/Body30
          translation=(0 0 0)
      PhysicalOffsetFrame Body21_offset: socket_parent_connectee_name=../../LoadCarryingExoskeleton_by_Moran/Body21
          translation=(0 0 0)
    WeldJoint jb29b24: socket_parent_frame_connectee_name=Body29_offset socket_child_frame_connectee_name=Body24_offset
      PhysicalOffsetFrame Body29_offset: socket_parent_connectee_name=../../LoadCarryingExoskeleton_by_Moran/Body29
          translation=(0 0 0)
      PhysicalOffsetFrame Body24_offset: socket_parent_connectee_name=../../LoadCarryingExoskeleton_by_Moran/Body24
          translation=(0 0 0)
    WeldJoint jb24b23: socket_parent_frame_connectee_name=Body24_offset socket_child_frame_connectee_name=Body23_offset
      PhysicalOffsetFrame Body24_offset: socket_parent_connectee_name=../../LoadCarryingExoskeleton_by_Moran/Body24
          translation=(0 0 0)
      PhysicalOffsetFrame Body23_offset: socket_parent_connectee_name=../../LoadCarryingExoskeleton_by_Moran/Body23
          translation=(0 0 0)
    WeldJoint jb21b28: socket_parent_frame_connectee_name=Body21_offset socket_child_frame_connectee_name=Body28_offset
      PhysicalOffsetFrame Body21_offset: socket_parent_connectee_name=../../LoadCarryingExoskeleton_by_Moran/Body21
          translation=(0 0 0)
      PhysicalOffsetFrame Body28_offset: socket_parent_connectee_name=../../LoadCarryingExoskeleton_by_Moran/Body28
          translation=(0 0 0)
    WeldJoint jb23b32: socket_parent_frame_connectee_name=Body23_offset socket_child_frame_connectee_name=Body32_offset
      PhysicalOffsetFrame Body23_offset: socket_parent_connectee_name=../../LoadCarryingExoskeleton_by_Moran/Body23
          translation=(0 0 0)
      PhysicalOffsetFrame Body32_offset: socket_parent_connectee_name=../../LoadCarryingExoskeleton_by_Moran/Body32
          translation=(0 0 0)
    PinJoint jb26b34: socket_parent_frame_connectee_name=Body26_offset socket_child_frame_connectee_name=Body34_offset
      Coordinate jb26b34_coord_0: default_value=1.0652
      PhysicalOffsetFrame Body26_offset: socket_parent_connectee_name=../../LoadCarryingExoskeleton_by_Moran/Body26
          translation=(0.3023 0.58846 0.7559875) orientation=(1.570796 0 0)
      PhysicalOffsetFrame Body34_offset: socket_parent_connectee_name=../../LoadCarryingExoskeleton_by_Moran/Body34
          translation=(0.3023 0.58846 0.7559875) orientation=(1.570796 0 0)
    WeldJoint jb34b25: socket_parent_frame_connectee_name=Body34_offset socket_child_frame_connectee_name=Body25_offset
      PhysicalOffsetFrame Body34_offset: socket_parent_connectee_name=../../LoadCarryingExoskeleton_by_Moran/Body34
          translation=(0 0 0)
      PhysicalOffsetFrame Body25_offset: socket_parent_connectee_name=../../LoadCarryingExoskeleton_by_Moran/Body25
          translation=(0 0 0)
    WeldJoint jb34b33: socket_parent_frame_connectee_name=Body34_offset socket_child_frame_connectee_name=Body33_offset
      PhysicalOffsetFrame Body34_offset: socket_parent_connectee_name=../../LoadCarryingExoskeleton_by_Moran/Body34
          translation=(0 0 0)
      PhysicalOffsetFrame Body33_offset: socket_parent_connectee_name=../../LoadCarryingExoskeleton_by_Moran/Body33
          translation=(0 0 0)
    PinJoint jb34b35: socket_parent_frame_connectee_name=Body34_offset socket_child_frame_connectee_name=Body35_offset
      Coordinate jb34b35_coord_0: default_value=-0.61901
      PhysicalOffsetFrame Body34_offset: socket_parent_connectee_name=../../LoadCarryingExoskeleton_by_Moran/Body34
          translation=(0.3020887 0.58846 1.405992) orientation=(1.570796 0 0)
      PhysicalOffsetFrame Body35_offset: socket_parent_connectee_name=../../LoadCarryingExoskeleton_by_Moran/Body35
          translation=(0.3020887 0.58846 1.405992) orientation=(1.570796 0 0)
    PinJoint jb35b27: socket_parent_frame_connectee_name=Body35_offset socket_child_frame_connectee_name=Body27_offset
      Coordinate jb35b27_coord_0: locked=true
      PhysicalOffsetFrame Body35_offset: socket_parent_connectee_name=../../LoadCarryingExoskeleton_by_Moran/Body35
          translation=(0.3100887 0.58846 1.438992) orientation=(0 1.570796 0)
      PhysicalOffsetFrame Body27_offset: socket_parent_connectee_name=../../LoadCarryingExoskeleton_by_Moran/Body27
          translation=(0.3100887 0.58846 1.438992) orientation=(0 1.570796 0)
    WeldJoint jb35b20: socket_parent_frame_connectee_name=Body35_offset socket_child_frame_connectee_name=Body20_offset
      PhysicalOffsetFrame Body35_offset: socket_parent_connectee_name=../../LoadCarryingExoskeleton_by_Moran/Body35
          translation=(0 0 0)
      PhysicalOffsetFrame Body20_offset: socket_parent_connectee_name=../../LoadCarryingExoskeleton_by_Moran/Body20
          translation=(0 0 0)
    FreeJoint foot_r: socket_parent_frame_connectee_name=toes_r_offset socket_child_frame_connectee_name=Body56_offset
      Coordinate foot_r_coord_0
      Coordinate foot_r_coord_1
      Coordinate foot_r_coord_2: locked=true
      Coordinate foot_r_coord_3: locked=true
      Coordinate foot_r_coord_4
      Coordinate foot_r_coord_5
      PhysicalOffsetFrame toes_r_offset: socket_parent_connectee_name=../../LoadCarryingExoskeleton_by_Moran/toes_r
          translation=(-0.23 -0.015 0)
      PhysicalOffsetFrame Body56_offset: socket_parent_connectee_name=../../LoadCarryingExoskeleton_by_Moran/Body56
          translation=(0.298818 0.11046 1.466) orientation=(1.570796 0 3.141593)
    FreeJoint foot_l: socket_parent_frame_connectee_name=toes_l_offset socket_child_frame_connectee_name=Body27_offset
      Coordinate foot_l_coord_0
      Coordinate foot_l_coord_1
      Coordinate foot_l_coord_2: locked=true
      Coordinate foot_l_coord_3: locked=true
      Coordinate foot_l_coord_4
      Coordinate foot_l_coord_5
      PhysicalOffsetFrame toes_l_offset: socket_parent_connectee_name=../../LoadCarryingExoskeleton_by_Moran/toes_l
          translation=(-0.23 -0.015 0)
      PhysicalOffsetFrame Body27_offset: socket_parent_connectee_name=../../LoadCarryingExoskeleton_by_Moran/Body27
          translation=(0.298818 0.58846 1.466) orientation=(1.570796 0 3.141593)
    WeldJoint jbackpack1: socket_parent_frame_connectee_name=Body7_offset
        socket_child_frame_connectee_name=backpack1_offset
      PhysicalOffsetFrame Body7_offset: socket_parent_connectee_name=../../LoadCarryingExoskeleton_by_Moran/Body7
          translation=(0.21095 0.19606 0.07381)
      PhysicalOffsetFrame backpack1_offset: socket_parent_connectee_name=../../LoadCarryingExoskeleton_by_Moran/backpack1
          translation=(0 0 0.2)
    WeldJoint jbcp: socket_parent_frame_connectee_name=pelvis_offset socket_child_frame_connectee_name=bcp_offset
      PhysicalOffsetFrame pelvis_offset: socket_parent_connectee_name=../../LoadCarryingExoskeleton_by_Moran/pelvis
          translation=(-0.2 0.2 0)
      PhysicalOffsetFrame bcp_offset: socket_parent_connectee_name=../../LoadCarryingExoskeleton_by_Moran/bcp
          translation=(0 0 0)
    WeldJoint jbcb: socket_parent_frame_connectee_name=Body7_offset socket_child_frame_connectee_name=bcb_offset
      PhysicalOffsetFrame Body7_offset: socket_parent_connectee_name=../../LoadCarryingExoskeleton_by_Moran/Body7
          translation=(0.21095 0.19606 0.07381) orientation=(1.570796 0 3.141593)
      PhysicalOffsetFrame bcb_offset: socket_parent_connectee_name=../../LoadCarryingExoskeleton_by_Moran/bcb
          translation=(0 0 0)
    WeldJoint jfch_r: socket_parent_frame_connectee_name=toes_r_offset socket_child_frame_connectee_name=fch_r_offset
      PhysicalOffsetFrame toes_r_offset: socket_parent_connectee_name=../../LoadCarryingExoskeleton_by_Moran/toes_r
          translation=(-0.23 -0.015 0)
      PhysicalOffsetFrame fch_r_offset: socket_parent_connectee_name=../../LoadCarryingExoskeleton_by_Moran/fch_r
          translation=(0 0 0)
    WeldJoint jfce_r: socket_parent_frame_connectee_name=Body56_offset socket_child_frame_connectee_name=fce_r_offset
      PhysicalOffsetFrame Body56_offset: socket_parent_connectee_name=../../LoadCarryingExoskeleton_by_Moran/Body56
          translation=(0.298818 0.11046 1.466) orientation=(1.570796 0 3.141593)
      PhysicalOffsetFrame fce_r_offset: socket_parent_connectee_name=../../LoadCarryingExoskeleton_by_Moran/fce_r
          translation=(0 0 0)
    WeldJoint jfch_l: socket_parent_frame_connectee_name=toes_l_offset socket_child_frame_connectee_name=fch_l_offset
      PhysicalOffsetFrame toes_l_offset: socket_parent_connectee_name=../../LoadCarryingExoskeleton_by_Moran/toes_l
          translation=(-0.23 -0.015 0)
      PhysicalOffsetFrame fch_l_offset: socket_parent_connectee_name=../../LoadCarryingExoskeleton_by_Moran/fch_l
          translation=(0 0 0)
    WeldJoint jfce_l: socket_parent_frame_connectee_name=Body27_offset socket_child_frame_connectee_name=fce_l_offset
      PhysicalOffsetFrame Body27_offset: socket_parent_connectee_name=../../LoadCarryingExoskeleton_by_Moran/Body27
          translation=(0.298818 0.58846 1.466) orientation=(1.570796 0 3.141593)
      PhysicalOffsetFrame fce_l_offset: socket_parent_connectee_name=../../LoadCarryingExoskeleton_by_Moran/fce_l
          translation=(0 0 0)
  ControllerSet:
    PrescribedController ExoCtr: actuator_list=(tao_hip_abduction_r tao_hip_rotation_r tao_hip_flexion_r tao_knee_flexion_r tao_ankle_flexion_r tao_hip_abduction_l tao_hip_rotation_l tao_hip_flexion_l tao_knee_flexion_l tao_ankle_flexion_l)
      FunctionSet ControlFunctions: Ctr_func_thar=PiecewiseConstantFunction(x=0, y=0)
          Ctr_func_thrr=PiecewiseConstantFunction(x=0, y=0) Ctr_func_thfr=PiecewiseConstantFunction(x=0, y=0)
          Ctr_func_tkfr=PiecewiseConstantFunction(x=0, y=0) Ctr_func_tafr=PiecewiseConstantFunction(x=0, y=0)
          Ctr_func_thal=PiecewiseConstantFunction(x=0, y=0) Ctr_func_thrl=PiecewiseConstantFunction(x=0, y=0)
          Ctr_func_thfl=PiecewiseConstantFunction(x=0, y=0) Ctr_func_tkfl=PiecewiseConstantFunction(x=0, y=0)
          Ctr_func_tafl=PiecewiseConstantFunction(x=0, y=0)
  ForceSet:
    TorqueActuator tao_hip_abduction_r: bodyA=Body39 bodyB=Body40 torque_is_global=false axis=(1 0 0)
    TorqueActuator tao_hip_rotation_r: bodyA=Body47 bodyB=Body48 torque_is_global=false axis=(0 0 1)
    TorqueActuator tao_hip_flexion_r: bodyA=Body41 bodyB=Body42 torque_is_global=false axis=(0 1 0)
    TorqueActuator tao_knee_flexion_r: bodyA=Body55 bodyB=Body5 torque_is_global=false axis=(0 1 0)
    TorqueActuator tao_ankle_flexion_r: bodyA=Body5 bodyB=Body6 torque_is_global=false axis=(0 1 0)
    TorqueActuator tao_hip_abduction_l: bodyA=Body10 bodyB=Body11 torque_is_global=false axis=(1 0 0)
    TorqueActuator tao_hip_rotation_l: bodyA=Body18 bodyB=Body19 torque_is_global=false axis=(0 0 1)
    TorqueActuator tao_hip_flexion_l: bodyA=Body12 bodyB=Body13 torque_is_global=false axis=(0 1 0)
    TorqueActuator tao_knee_flexion_l: bodyA=Body26 bodyB=Body34 torque_is_global=false axis=(0 1 0)
    TorqueActuator tao_ankle_flexion_l: bodyA=Body34 bodyB=Body35 torque_is_global=false axis=(0 1 0)
    BushingForce pHRI: socket_frame1_connectee_name=bcp socket_frame2_connectee_name=bcb
        rotational_stiffness=(0 0 500) [Nm/rad] translational_stiffness=(10000 10000 0) [N/m]
        rotational_damping=(0 0 50) [Nm/(rad/s)] translational_damping=(1000 1000 0) [N/(m/s)]
    HuntCrossleyForce cfoot_r: appliesForce=false
      ContactParametersSet contact_parameters:
        ContactParameters: geometry=(floor ball_foot_fr_r ball_foot_fl_r ball_foot_br_r ball_foot_bl_r)
            stiffness=100000000 dissipation=0.5 static_friction=0.9 dynamic_friction=0.9 viscous_friction=0.6
    HuntCrossleyForce cfoot_l:
      ContactParametersSet contact_parameters:
        ContactParameters: geometry=(floor ball_foot_fr_l ball_foot_fl_l ball_foot_br_l ball_foot_bl_l)
            stiffness=100000000 dissipation=0.5 static_friction=0.9 dynamic_friction=0.9 viscous_friction=0.6
    BushingForce pHRI_fr: socket_frame1_connectee_name=fch_r socket_frame2_connectee_name=fce_r
        rotational_stiffness=(0 0 2000) translational_stiffness=(20000 20000 0) rotational_damping=(0 0 200)
        translational_damping=(0 400 0)
    BushingForce pHRI_fl: socket_frame1_connectee_name=fch_l socket_frame2_connectee_name=fce_l
        rotational_stiffness=(0 0 4000) translational_stiffness=(40000 40000 0) rotational_damping=(0 0 400)
        translational_damping=(16000 1000 0)
  MarkerSet:
    Marker Sternum: socket_parent_frame_connectee_name=../torso (0.1174053 0.3072436 0.001216898)
    Marker R.Acromium: socket_parent_frame_connectee_name=../torso (-0.004933102 0.4265378 0.1707051)
    Marker L.Acromium: socket_parent_frame_connectee_name=../torso (-0.003017024 0.4416713 -0.1698235)
    Marker Top.Head: socket_parent_frame_connectee_name=../torso (0.09110731 0.6959825 0.01290855)
    Marker R.ASIS: socket_parent_frame_connectee_name=../pelvis (0.02345612 0.03661581 0.1304563)
    Marker L.ASIS: socket_parent_frame_connectee_name=../pelvis (0.02834558 0.02796611 -0.1315683)
    Marker V.Sacral: socket_parent_frame_connectee_name=../pelvis (-0.1722053 0.03952478 0.007566797)
    Marker R.Thigh.Upper: socket_parent_frame_connectee_name=../femur_r (0.04671709 -0.220054 0.09177926)
    Marker R.Thigh.Front: socket_parent_frame_connectee_name=../femur_r (0.1083772 -0.2818034 -0.0006219432)
    Marker R.Thigh.Rear: socket_parent_frame_connectee_name=../femur_r (0.03576758 -0.3408651 0.08177331)
    Marker R.Knee.Lat: socket_parent_frame_connectee_name=../femur_r (-0.003540128 -0.4261031 0.06139693)
    Marker R.Knee.Med: socket_parent_frame_connectee_name=../femur_r (0.0005084375 -0.4427469 -0.05984311)
    Marker R.Shank.Upper: socket_parent_frame_connectee_name=../tibia_r (-0.02677334 -0.06017348 0.07023089)
    Marker R.Shank.Front: socket_parent_frame_connectee_name=../tibia_r (0.05079523 -0.09524076 0.0195453)
    Marker R.Shank.Rear: socket_parent_frame_connectee_name=../tibia_r (-0.01128368 -0.1453282 0.08030958)
    Marker R.Ankle.Lat: socket_parent_frame_connectee_name=../tibia_r (-0.007489196 -0.4306556 0.05551903)
    Marker R.Ankle.Med: socket_parent_frame_connectee_name=../tibia_r (0.004621187 -0.4161799 -0.03324825)
    Marker R.Heel: socket_parent_frame_connectee_name=../calcn_r (-0.0202908 0.01712987 -0.00544032)
    Marker R.Midfoot.Sup: socket_parent_frame_connectee_name=../calcn_r (0.1227211 0.03341821 -0.04034826)
    Marker R.Midfoot.Lat: socket_parent_frame_connectee_name=../calcn_r (0.1182794 0.006446897 0.06541217)
    Marker R.Toe.Lat: socket_parent_frame_connectee_name=../calcn_r (0.2082832 -0.01647205 0.0725999)
    Marker R.Toe.Med: socket_parent_frame_connectee_name=../calcn_r (0.2099098 0.003856216 -0.03472516)
    Marker R.Toe.Tip: socket_parent_frame_connectee_name=../calcn_r (0.2709653 0.003303904 -0.003200757)
    Marker L.Thigh.Upper: socket_parent_frame_connectee_name=../femur_l (0.02307955 -0.2066957 -0.09791851)
    Marker L.Thigh.Front: socket_parent_frame_connectee_name=../femur_l (0.1109892 -0.2487444 -0.03395361)
    Marker L.Thigh.Rear: socket_parent_frame_connectee_name=../femur_l (0.01551797 -0.3155635 -0.08218494)
    Marker L.Knee.Lat: socket_parent_frame_connectee_name=../femur_l (-0.008519413 -0.4456874 -0.06419522)
    Marker L.Knee.Med: socket_parent_frame_connectee_name=../femur_l (0.008553861 -0.445881 0.05079931)
    Marker L.Shank.Upper: socket_parent_frame_connectee_name=../tibia_l (-0.005980712 -0.07146909 -0.07966279)
    Marker L.Shank.Front: socket_parent_frame_connectee_name=../tibia_l (0.04524118 -0.1215877 -0.03091364)
    Marker L.Shank.Rear: socket_parent_frame_connectee_name=../tibia_l (-0.02460277 -0.114546 -0.08809414)
    Marker L.Ankle.Lat: socket_parent_frame_connectee_name=../tibia_l (-0.003602272 -0.4283608 -0.05731681)
    Marker L.Ankle.Med: socket_parent_frame_connectee_name=../tibia_l (0.01294115 -0.4052854 0.03267873)
    Marker L.Heel: socket_parent_frame_connectee_name=../calcn_l (-0.02242271 0.02641185 0.006381644)
    Marker L.Midfoot.Sup: socket_parent_frame_connectee_name=../calcn_l (0.1493365 0.03658403 0.03471788)
    Marker L.Midfoot.Lat: socket_parent_frame_connectee_name=../calcn_l (0.1328827 0.01741305 -0.06237179)
    Marker L.Toe.Lat: socket_parent_frame_connectee_name=../calcn_l (0.1965929 -0.006464757 -0.06711593)
    Marker L.Toe.Med: socket_parent_frame_connectee_name=../calcn_l (0.2116351 0.01334309 0.03342008)
    Marker L.Toe.Tip: socket_parent_frame_connectee_name=../calcn_l (0.2613057 0.01003932 0.009268131)
  ContactGeometrySet:
    ContactHalfSpace floor: socket_frame_connectee_name=../LoadCarryingExoskeleton_by_Moran/ground location=(0 0 0)
        orientation=(0 0 -1.570796)
    ContactSphere ball_foot_fr_r: socket_frame_connectee_name=../LoadCarryingExoskeleton_by_Moran/Body56
        location=(0.018818 0.07046 1.466) radius=0.01
    ContactSphere ball_foot_fl_r: socket_frame_connectee_name=../LoadCarryingExoskeleton_by_Moran/Body56
        location=(0.018818 0.15046 1.466) radius=0.01
    ContactSphere ball_foot_br_r: socket_frame_connectee_name=../LoadCarryingExoskeleton_by_Moran/Body56
        location=(0.578818 0.07046 1.466) radius=0.01
    ContactSphere ball_foot_bl_r: socket_frame_connectee_name=../LoadCarryingExoskeleton_by_Moran/Body56
        location=(0.578818 0.15046 1.466) radius=0.01
    ContactSphere ball_foot_fr_l: socket_frame_connectee_name=../LoadCarryingExoskeleton_by_Moran/Body27
        location=(0.018818 0.54846 1.466) radius=0.01
    ContactSphere ball_foot_fl_l: socket_frame_connectee_name=../LoadCarryingExoskeleton_by_Moran/Body27
        location=(0.018818 0.62846 1.466) radius=0.01
    ContactSphere ball_foot_br_l: socket_frame_connectee_name=../LoadCarryingExoskeleton_by_Moran/Body27
        location=(0.578818 0.54846 1.466) radius=0.01
    ContactSphere ball_foot_bl_l: socket_frame_connectee_name=../LoadCarryingExoskeleton_by_Moran/Body27
        location=(0.578818 0.62846 1.466) radius=0.01
