# OpenSim document version 30516
Model subject01:
  gravity: 0 -9.80665 0
  length_units: meters
  force_units: N
  credits:
    Delp S.L., Loan J.P., Hoy M.G., Zajac F.E., Topp E.L., Rosen J.M., Thelen D.G., Anderson F.C., Seth A. Notes: 3D, 23 DOF gait model created by D.G. Thelen, Univ. of Wisconsin-Madison, and Ajay Seth, Frank C. Anderson, and Scott L. Delp, Stanford University. Lower extremity joint defintions based on Delp et al. (1990). Low back joint and anthropometry based on Anderson and Pandy (1999, 2001). Planar knee model of Yamaguchi and Zajac (1989). Seth replaced tibia translation constraints with a CustomJoint for the knee and removed the patella to eliminate all kinematic constraints; insertions of the quadrucepts are handled with moving points in the tibia frame as defined by Delp 1990. Number of muscles was reduced by Anderson to improve simulation speed for demonstrations and is not intended to be used in research. License: Creative Commons (CCBY 3.0). You are free to distribute, remix, tweak, and build upon this work, even commercially, as long as you credit us for the original creation. http://creativecommons.org/licenses/by/3.0/ More Information: http://simtk-confluence.stanford.edu:8080/display/OpenSim/Gait+2392+and+2354+Models
  publications:
    Delp, S.L., Loan, J.P., Hoy, M.G., Zajac, F.E., Topp E.L., Rosen, J.M.: An interactive graphics-based model of the lower extremity to study orthopaedic surgical procedures, IEEE Transactions on Biomedical Engineering, vol. 37, pp. 757-767, 1990. Yamaguchi G.T., Zajac F.E.: A planar model of the knee joint to characterize the knee extensor mechanism." J . Biomech. vol. 22. pp. 1-10. 1989. Anderson F.C., Pandy M.G.: A dynamic optimization solution for vertical jumping in three dimensions. Computer Methods in Biomechanics and Biomedical Engineering 2:201-231, 1999. Anderson F.C., Pandy M.G.: Dynamic optimization of human walking. Journal of Biomechanical Engineering 123:381-390, 2001.
  Ground
  BodySet:
    Body pelvis: mass=11.37517 [kg] mass_center=(-0.0724376 0 0) inertia=(0.1042331 0.08831422 0.05870716 0 0 0)
        meshes=(sacrum.vtp pelvis.vtp l_pelvis.vtp)
    Body femur_r: mass=8.984038 mass_center=(0 -0.1950308 0) inertia=(0.1702207 0.04462096 0.1795009 0 0 0)
        meshes=femur_r.vtp
    Body tibia_r: mass=3.581001 mass_center=(0 -0.1845572 0) inertia=(0.04756937 0.004813567 0.04823005 0 0 0)
        meshes=(tibia_r.vtp fibula.vtp)
    Body talus_r: mass=0.09658802 mass_center=(0 0 0) inertia=(0.001198606 0.001198606 0.001198606 0 0 0)
        meshes=talus.vtp
    Body calcn_r: mass=1.20735 mass_center=(0.1027085 0.03081254 0) inertia=(0.001426474 0.003973749 0.004177531 0 0 0)
        meshes=foot.vtp
    Body toes_r: mass=0.2092097 mass_center=(0.03553713 0.006162509 -0.01797398)
        inertia=(0.000101891 0.000203782 0.000101891 0 0 0) meshes=bofoot.vtp
    Body femur_l: mass=8.984038 mass_center=(0 -0.1950308 0) inertia=(0.1702207 0.04462096 0.1795009 0 0 0)
        meshes=femur_l.vtp
    Body tibia_l: mass=3.581001 mass_center=(0 -0.1845572 0) inertia=(0.04756937 0.004813567 0.04823005 0 0 0)
        meshes=(tibia_l.vtp l_fibula.vtp)
    Body talus_l: mass=0.09658802 mass_center=(0 0 0) inertia=(0.001198606 0.001198606 0.001198606 0 0 0)
        meshes=l_talus.vtp
    Body calcn_l: mass=1.20735 mass_center=(0.1027085 0.03081254 0) inertia=(0.001426474 0.003973749 0.004177531 0 0 0)
        meshes=l_foot.vtp
    Body toes_l: mass=0.2092097 mass_center=(0.03553713 0.006162509 0.01797398)
        inertia=(0.000101891 0.000203782 0.000101891 0 0 0) meshes=l_bofoot.vtp
    Body torso: mass=33.06845 mass_center=(0.004375757 0.3455104 0.03500176)
        inertia=(1.660314 0.8507069 1.611783 0 0 0) meshes=(hat_spine.vtp hat_jaw.vtp hat_skull.vtp hat_ribs.vtp)
  JointSet:
    CustomJoint ground_pelvis: socket_parent_frame_connectee_name=../ground socket_child_frame_connectee_name=../pelvis
      Coordinate pelvis_tilt: default_value=0 range=(-1.570796 1.570796) clamped=false locked=true
      Coordinate pelvis_list: default_value=0 range=(-1.570796 1.570796) clamped=false locked=true
      Coordinate pelvis_rotation: default_value=0 range=(-1.570796 1.570796) clamped=false locked=true
      Coordinate pelvis_tx: default_value=0 range=(-5 5) clamped=false locked=true
      Coordinate pelvis_ty: default_value=1.42 range=(-1 2) clamped=false
      Coordinate pelvis_tz: default_value=0 range=(-3 3) clamped=false locked=true
      SpatialTransform:
        TransformAxis rotation1: coordinates=pelvis_tilt axis=(0 0 1) LinearFunction(coefficients=1 0)
        TransformAxis rotation2: coordinates=pelvis_list axis=(1 0 0) LinearFunction(coefficients=1 0)
        TransformAxis rotation3: coordinates=pelvis_rotation axis=(0 1 0) LinearFunction(coefficients=1 0)
        TransformAxis translation1: coordinates=pelvis_tx axis=(1 0 0) LinearFunction(coefficients=1 0)
        TransformAxis translation2: coordinates=pelvis_ty axis=(0 1 0) LinearFunction(coefficients=1 0)
        TransformAxis translation3: coordinates=pelvis_tz axis=(0 0 1) LinearFunction(coefficients=1 0)
    CustomJoint hip_r: socket_parent_frame_connectee_name=pelvis_offset socket_child_frame_connectee_name=../femur_r
      Coordinate hip_flexion_r: default_value=0 range=(-2.094395 2.094395) clamped=false locked=true
      Coordinate hip_adduction_r: default_value=0 range=(-2.094395 2.094395) clamped=false locked=true
      Coordinate hip_rotation_r: default_value=0 range=(-2.094395 2.094395) clamped=false locked=true
      PhysicalOffsetFrame pelvis_offset: socket_parent_connectee_name=../../pelvis
          translation=(-0.0724376 -0.06772454 0.08555218) [meters]
      SpatialTransform: axes_held_at_zero=(translation1 translation2 translation3)
        TransformAxis rotation1: coordinates=hip_flexion_r axis=(0 0 1) LinearFunction(coefficients=1 0)
        TransformAxis rotation2: coordinates=hip_adduction_r axis=(1 0 0) LinearFunction(coefficients=1 0)
        TransformAxis rotation3: coordinates=hip_rotation_r axis=(0 1 0) LinearFunction(coefficients=1 0)
    CustomJoint knee_r: socket_parent_frame_connectee_name=../femur_r socket_child_frame_connectee_name=../tibia_r
      Coordinate knee_angle_r: default_value=0 range=(-2.094395 0.1745329) clamped=false locked=true
      SpatialTransform: axes_held_at_zero=(rotation2 rotation3 translation3)
        TransformAxis rotation1: coordinates=knee_angle_r axis=(0 0 1) LinearFunction(coefficients=1 0)
        TransformAxis translation1: coordinates=knee_angle_r axis=(1 0 0)
          MultiplierFunction: scale=1.14724
            SimmSpline: x=(-2.0944 -1.74533 -1.39626 -1.0472 -0.698132 -0.349066 -0.174533 0.197344 0.337395 0.490178 1.52146 2.0944)
                y=(-0.0032 0.00179 0.00411 0.0041 0.00212 -0.001 -0.0031 -0.005227 -0.005435 -0.005574 -0.005435 -0.00525)
        TransformAxis translation2: coordinates=knee_angle_r axis=(0 1 0)
          MultiplierFunction: scale=1.14724
            SimmSpline: x=(-2.0944 -1.22173 -0.523599 -0.349066 -0.174533 0.159149 2.0944)
                y=(-0.4226 -0.4082 -0.399 -0.3976 -0.3966 -0.395264 -0.396)
    CustomJoint ankle_r: socket_parent_frame_connectee_name=tibia_r_offset socket_child_frame_connectee_name=../talus_r
      Coordinate ankle_angle_r: default_value=0 range=(-1.570796 1.570796) clamped=false locked=true
      PhysicalOffsetFrame tibia_r_offset: socket_parent_connectee_name=../../tibia_r translation=(0 -0.4250649 0)
      SpatialTransform: axes_held_at_zero=(rotation2 rotation3 translation1 translation2 translation3)
        TransformAxis rotation1: coordinates=ankle_angle_r axis=(0 0 1) LinearFunction(coefficients=1 0)
    CustomJoint subtalar_r: socket_parent_frame_connectee_name=talus_r_offset
        socket_child_frame_connectee_name=../calcn_r
      Coordinate subtalar_angle_r: default_value=0 range=(-1.570796 1.570796) clamped=false locked=true
      PhysicalOffsetFrame talus_r_offset: socket_parent_connectee_name=../../talus_r
          translation=(-0.05432871 -0.04673138 0.008822706)
      SpatialTransform: axes_held_at_zero=(rotation2 rotation3 translation1 translation2 translation3)
        TransformAxis rotation1: coordinates=subtalar_angle_r axis=(0.7871796 0.6047475 -0.1209495)
            LinearFunction(coefficients=1 0)
    CustomJoint mtp_r: socket_parent_frame_connectee_name=calcn_r_offset socket_child_frame_connectee_name=../toes_r
      Coordinate mtp_angle_r: default_value=0 range=(-1.570796 1.570796) clamped=false locked=true
      PhysicalOffsetFrame calcn_r_offset: socket_parent_connectee_name=../../calcn_r
          translation=(0.1836428 -0.00205417 0.001109252)
      SpatialTransform: axes_held_at_zero=(rotation2 rotation3 translation1 translation2 translation3)
        TransformAxis rotation1: coordinates=mtp_angle_r axis=(0 0 1) LinearFunction(coefficients=1 0)
    CustomJoint hip_l: socket_parent_frame_connectee_name=pelvis_offset socket_child_frame_connectee_name=../femur_l
      Coordinate hip_flexion_l: default_value=0 range=(-2.094395 2.094395) clamped=false locked=true
      Coordinate hip_adduction_l: default_value=0 range=(-2.094395 2.094395) clamped=false locked=true
      Coordinate hip_rotation_l: default_value=0 range=(-2.094395 2.094395) clamped=false locked=true
      PhysicalOffsetFrame pelvis_offset: socket_parent_connectee_name=../../pelvis
          translation=(-0.0724376 -0.06772454 -0.08555218)
      SpatialTransform: axes_held_at_zero=(translation1 translation2 translation3)
        TransformAxis rotation1: coordinates=hip_flexion_l axis=(0 0 1) LinearFunction(coefficients=1 0)
        TransformAxis rotation2: coordinates=hip_adduction_l axis=(-1 0 0) LinearFunction(coefficients=1 0)
        TransformAxis rotation3: coordinates=hip_rotation_l axis=(0 -1 0) LinearFunction(coefficients=1 0)
    CustomJoint knee_l: socket_parent_frame_connectee_name=../femur_l socket_child_frame_connectee_name=../tibia_l
      Coordinate knee_angle_l: default_value=0 range=(-2.094395 0.1745329) clamped=false locked=true
      SpatialTransform: axes_held_at_zero=(rotation2 rotation3 translation3)
        TransformAxis rotation1: coordinates=knee_angle_l axis=(0 0 1) LinearFunction(coefficients=1 0)
        TransformAxis translation1: coordinates=knee_angle_l axis=(1 0 0)
          MultiplierFunction: scale=1.14724
            SimmSpline: x=(-2.0944 -1.74533 -1.39626 -1.0472 -0.698132 -0.349066 -0.174533 0.197344 0.337395 0.490178 1.52146 2.0944)
                y=(-0.0032 0.00179 0.00411 0.0041 0.00212 -0.001 -0.0031 -0.005227 -0.005435 -0.005574 -0.005435 -0.00525)
        TransformAxis translation2: coordinates=knee_angle_l axis=(0 1 0)
          MultiplierFunction: scale=1.14724
            SimmSpline: x=(-2.0944 -1.22173 -0.523599 -0.349066 -0.174533 0.159149 2.0944)
                y=(-0.4226 -0.4082 -0.399 -0.3976 -0.3966 -0.395264 -0.396)
    CustomJoint ankle_l: socket_parent_frame_connectee_name=tibia_l_offset socket_child_frame_connectee_name=../talus_l
      Coordinate ankle_angle_l: default_value=0 range=(-1.047198 1.047198) clamped=false locked=true
      PhysicalOffsetFrame tibia_l_offset: socket_parent_connectee_name=../../tibia_l translation=(0 -0.4250649 0)
      SpatialTransform: axes_held_at_zero=(rotation2 rotation3 translation1 translation2 translation3)
        TransformAxis rotation1: coordinates=ankle_angle_l axis=(0 0 1) LinearFunction(coefficients=1 0)
    CustomJoint subtalar_l: socket_parent_frame_connectee_name=talus_l_offset
        socket_child_frame_connectee_name=../calcn_l
      Coordinate subtalar_angle_l: default_value=0 range=(-1.570796 1.570796) clamped=false locked=true
      PhysicalOffsetFrame talus_l_offset: socket_parent_connectee_name=../../talus_l
          translation=(-0.05432871 -0.04673138 -0.008822706)
      SpatialTransform: axes_held_at_zero=(rotation2 rotation3 translation1 translation2 translation3)
        TransformAxis rotation1: coordinates=subtalar_angle_l axis=(-0.7871796 -0.6047475 -0.1209495)
            LinearFunction(coefficients=1 0)
    CustomJoint mtp_l: socket_parent_frame_connectee_name=calcn_l_offset socket_child_frame_connectee_name=../toes_l
      Coordinate mtp_angle_l: default_value=0 range=(-1.047198 1.047198) clamped=false locked=true
      PhysicalOffsetFrame calcn_l_offset: socket_parent_connectee_name=../../calcn_l
          translation=(0.1836428 -0.00205417 -0.001109252)
      SpatialTransform: axes_held_at_zero=(rotation2 rotation3 translation1 translation2 translation3)
        TransformAxis rotation1: coordinates=mtp_angle_l axis=(0 0 1) LinearFunction(coefficients=1 0)
    CustomJoint back: socket_parent_frame_connectee_name=pelvis_offset socket_child_frame_connectee_name=../torso
      Coordinate lumbar_extension: default_value=0 range=(-1.570796 1.570796) clamped=false locked=true
      Coordinate lumbar_bending: default_value=0 range=(-1.570796 1.570796) clamped=false locked=true
      Coordinate lumbar_rotation: default_value=0 range=(-1.570796 1.570796) clamped=false locked=true
      PhysicalOffsetFrame pelvis_offset: socket_parent_connectee_name=../../pelvis
          translation=(-0.1031749 0.08350303 0)
      SpatialTransform: axes_held_at_zero=(translation1 translation2 translation3)
        TransformAxis rotation1: coordinates=lumbar_extension axis=(0 0 1) LinearFunction(coefficients=1 0)
        TransformAxis rotation2: coordinates=lumbar_bending axis=(1 0 0) LinearFunction(coefficients=1 0)
        TransformAxis rotation3: coordinates=lumbar_rotation axis=(0 1 0) LinearFunction(coefficients=1 0)
  MarkerSet:
    Marker Sternum: socket_parent_frame_connectee_name=../torso (0.1174053 0.3072436 0.001216898)
    Marker R.Acromium: socket_parent_frame_connectee_name=../torso (-0.004933102 0.4265378 0.1707051)
    Marker L.Acromium: socket_parent_frame_connectee_name=../torso (-0.003017024 0.4416713 -0.1698235)
    Marker Top.Head: socket_parent_frame_connectee_name=../torso (0.09110731 0.6959825 0.01290855)
    Marker R.ASIS: socket_parent_frame_connectee_name=../pelvis (0.02345612 0.03661581 0.1304563)
    Marker L.ASIS: socket_parent_frame_connectee_name=../pelvis (0.02834558 0.02796611 -0.1315683)
    Marker V.Sacral: socket_parent_frame_connectee_name=../pelvis (-0.1722053 0.03952478 0.007566797)
    Marker R.Thigh.Upper: socket_parent_frame_connectee_name=../femur_r (0.04671709 -0.220054 0.09177926)
    Marker R.Thigh.Front: socket_parent_frame_connectee_name=../femur_r (0.1083772 -0.2818034 -0.0006219432)
    Marker R.Thigh.Rear: socket_parent_frame_connectee_name=../femur_r (0.03576758 -0.3408651 0.08177331)
    Marker R.Knee.Lat: socket_parent_frame_connectee_name=../femur_r (-0.003540128 -0.4261031 0.06139693)
    Marker R.Knee.Med: socket_parent_frame_connectee_name=../femur_r (0.0005084375 -0.4427469 -0.05984311)
    Marker R.Shank.Upper: socket_parent_frame_connectee_name=../tibia_r (-0.02677334 -0.06017348 0.07023089)
    Marker R.Shank.Front: socket_parent_frame_connectee_name=../tibia_r (0.05079523 -0.09524076 0.0195453)
    Marker R.Shank.Rear: socket_parent_frame_connectee_name=../tibia_r (-0.01128368 -0.1453282 0.08030958)
    Marker R.Ankle.Lat: socket_parent_frame_connectee_name=../tibia_r (-0.007489196 -0.4306556 0.05551903)
    Marker R.Ankle.Med: socket_parent_frame_connectee_name=../tibia_r (0.004621187 -0.4161799 -0.03324825)
    Marker R.Heel: socket_parent_frame_connectee_name=../calcn_r (-0.0202908 0.01712987 -0.00544032)
    Marker R.Midfoot.Sup: socket_parent_frame_connectee_name=../calcn_r (0.1227211 0.03341821 -0.04034826)
    Marker R.Midfoot.Lat: socket_parent_frame_connectee_name=../calcn_r (0.1182794 0.006446897 0.06541217)
    Marker R.Toe.Lat: socket_parent_frame_connectee_name=../calcn_r (0.2082832 -0.01647205 0.0725999)
    Marker R.Toe.Med: socket_parent_frame_connectee_name=../calcn_r (0.2099098 0.003856216 -0.03472516)
    Marker R.Toe.Tip: socket_parent_frame_connectee_name=../calcn_r (0.2709653 0.003303904 -0.003200757)
    Marker L.Thigh.Upper: socket_parent_frame_connectee_name=../femur_l (0.02307955 -0.2066957 -0.09791851)
    Marker L.Thigh.Front: socket_parent_frame_connectee_name=../femur_l (0.1109892 -0.2487444 -0.03395361)
    Marker L.Thigh.Rear: socket_parent_frame_connectee_name=../femur_l (0.01551797 -0.3155635 -0.08218494)
    Marker L.Knee.Lat: socket_parent_frame_connectee_name=../femur_l (-0.008519413 -0.4456874 -0.06419522)
    Marker L.Knee.Med: socket_parent_frame_connectee_name=../femur_l (0.008553861 -0.445881 0.05079931)
    Marker L.Shank.Upper: socket_parent_frame_connectee_name=../tibia_l (-0.005980712 -0.07146909 -0.07966279)
    Marker L.Shank.Front: socket_parent_frame_connectee_name=../tibia_l (0.04524118 -0.1215877 -0.03091364)
    Marker L.Shank.Rear: socket_parent_frame_connectee_name=../tibia_l (-0.02460277 -0.114546 -0.08809414)
    Marker L.Ankle.Lat: socket_parent_frame_connectee_name=../tibia_l (-0.003602272 -0.4283608 -0.05731681)
    Marker L.Ankle.Med: socket_parent_frame_connectee_name=../tibia_l (0.01294115 -0.4052854 0.03267873)
    Marker L.Heel: socket_parent_frame_connectee_name=../calcn_l (-0.02242271 0.02641185 0.006381644)
    Marker L.Midfoot.Sup: socket_parent_frame_connectee_name=../calcn_l (0.1493365 0.03658403 0.03471788)
    Marker L.Midfoot.Lat: socket_parent_frame_connectee_name=../calcn_l (0.1328827 0.01741305 -0.06237179)
    Marker L.Toe.Lat: socket_parent_frame_connectee_name=../calcn_l (0.1965929 -0.006464757 -0.06711593)
    Marker L.Toe.Med: socket_parent_frame_connectee_name=../calcn_l (0.2116351 0.01334309 0.03342008)
    Marker L.Toe.Tip: socket_parent_frame_connectee_name=../calcn_l (0.2613057 0.01003932 0.009268131)
